# Template of LAMMPS input file for single point energy calculations before and after structure relaxation
# Author: Jonathan Yik Chang Ting
# Date: 21/02/2021

# --------------- INITIALIZATION ---------------
clear           # Clear all memory
units           metal  # Report in g/mol, A, ps, eV, K, bars
boundary        p p p  # Periodic boundaries in x-, y-, z- directions
atom_style      atomic

# --------------- ATOM DEFINITION ---------------
read_data       {INP_DIR_NAME}{INP_FILE_NAME}.lmp group {ELEMENT1}{ELEMENT2} nocoeff
change_box      all x scale 3 y scale 3 z scale 3

# --------------- FORCE FIELDS ---------------
pair_style      eam/alloy
pair_coeff      * * {POT_FILE} {ELEMENT1} {ELEMENT2}
neighbor        2.0 bin  # build list by binning, add 2 A skin
neigh_modify    delay 10 check yes  # Wait 10 steps after building, build only when atom moved > skin/2

# --------------- SETTINGS ---------------
thermo          {S0_THER_INT}  # Thermodynamic output frequency
thermo_style    custom step time temp press pe ke etotal
dump            dumpS0 all custom/mpiio {S0_DUMP_INT} {INP_FILE_NAME}S0.*.mpiio.lmp id type x y z
dump_modify     dumpS0 pad 8
fix             nhS0 all nvt temp {INIT_TEMP} {INIT_TEMP} $(100.0*dt)

# --------------- SIMULATION RUNS ---------------
print           "--------------- SINGLE POINT ENERGY CALCULATION---------------"
run             0

print           "--------------- MINIMISATION ---------------"
reset_timestep  0
min_style       cg  # Polak-Ribiere version
minimize        1e-15 1e-15 100000 100000  # E tol, F tol, max iter, max F/E eval

print           "--------------- SINGLE POINT ENERGY CALCULATION---------------"
run             0

unfix           nhS0
undump          dumpS0

# --------------- DONE ---------------
print ""
print "DONE!"
print "------------------------------------------------------------------------------------------------------------------------------"
print ""
